# Problema V-1
# En la siguiente Tabla, y es la pureza del oxígeno producido en un proceso de destilación química, y x es el porcentaje de hidrocarburos que están presentes en el condensador principal de la unidad de destilación.
# a)  Representar el diagrama de dispersión
# b) Ajustar un modelo de regresión lineal simple a los datos de pureza de oxígeno de la Tabla
# c )  Evaluar a cuanto corresponderia un valor de x = 1.10
#
# Número de  Nivel de  Pureza
# Observación  hidrocarburo
# x (%)  y (%)
# 1  0.99  90.01
# 2  1.02  89.05
# 3  1.15  91.43
# 4  1.29  93.74
# 5  1.46  96.73
# 6  1.36  94.45
# 7  0.87  87.59
# 8  1.23  91.77
# 9  1.55  99.42
# 10  1.40  93.65
# 11  1.19  93.54
# 12  1.15  92.52
# 13  0.98  90.56
# 14  1.01  89.54
# 15  1.11  89.85
# 16  1.20  90.39
# 17  1.26  93.25
# 18  1.32  93.41
# 19  1.43  94.98
# 20  0.95  87.33
A := READPRN("C:\Users\Lucas\Documents\01 A Facultad\3° Año\1° Semestre\Estadistica II\TPs\TP 3\ej1_tp_5.txt")
rows(A) = 20
cols(A) = 3
x := A[:, 1]
y := A[:, 2]
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n := length(x) = 20
i := 0 .. n - 1
sum(y[i], i) == n*a + b*sum(x[i], i)
sum(x[i]*y[i], i) == a*sum(x[i], i) + b*sum(x[i]^2, i)
[a; b] := [n, sum(x[i], i); sum(x[i], i), sum(x[i]^2, i)]^-1*[sum(y[i], i); sum(x[i]*y[i], i)]
a = 74.2833  # Ordenada al origen
b = 14.9475  # Pendiente
t := min(x), min(x) + 0.01 .. max(x)
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# c )
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a + b*1.1 = 90.7255
x := 0
y := 0
y := READPRN("C:\Users\Lucas\Documents\01 A Facultad\3° Año\1° Semestre\Estadistica II\TPs\TP 3\covid.txt")
n := length(y) = 58
i := 0 .. n - 1
x[i] := i
[a; b] := [n, sum(x[i], i); sum(x[i], i), sum(x[i]^2, i)]^-1*[sum(y[i], i); sum(x[i]*y[i], i)]
a = -0.310929  # Ordenada al origen
b = 2.68726  # Pendiente
t := min(x), min(x) + 0.01 .. max(x)
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# c )
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