# Worksheet setting: ORIGIN = 1
# Problema 1:
# Se quiere evaluar la eficacia de distintas dosis de un fármaco contra la hipertensión arterial, comparándola con la de una dieta sin sal. Para ello se seleccionan al azar 25 hipertensos y se distribuyen aleatoriamente en 5 grupos. Al primero de ellos no se le suministra ningún tratamiento, al segundo una dieta con un contenido pobre en sal, al tercero una dieta sin sal, al cuarto el fármaco a una dosis determinada y al quinto el mismo fármaco a otra dosis. Las presiones arteriales sistólicas de los 25 sujetos al finalizar los tratamientos son:
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# Elaborar la Tabla de Análisis de la Varianza
Y := [
    180, 172, 163, 158, 147;
    173, 158, 170, 146, 152;
    175, 167, 158, 160, 143;
    182, 160, 162, 171, 155;
    181, 175, 170, 155, 160
]
α := 0.05  # Nivel de significancia
k := 5  # Numero de tratamientos
n := 5  # Tamaño de la muestra
i := 1 .. k
j := 1 .. n
y[i] := mean(Y[:, i])
y = [178.2; 166.4; 164.6; 158; 151.4]  # Vector de medias
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s2w := 1/(k*(n - 1))*sum(sum((Y[j, i] - y[i])^2, j = 1 .. n), i = 1 .. k) = 44.72  # Cambia respecto del apunte porque las muestras estan dadas en las columnas
s2w := 1/(k*(n - 1))*sum(sum((transpose(Y)[i, j] - y[i])^2, j = 1 .. n), i = 1 .. k) = 44.72  # Cualquier opcion es lo mismo
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s2h := n/(k - 1)*sum((y[i] - mean(y))^2, i = 1 .. k) = 502.66
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F == SS(Tr)/(k - 1)/(SSE/(k*(n - 1))) == MS(Tr)/MSE == s2h/s2w
F := s2h/s2w = 11.2402
ν1 := k - 1 = 4  # Grados de libertad del numerador
ν2 := k*(n - 1) = 20  # Grados de libertad del denominador
t := 0, 0.01 .. 5
F05 := qF(1 - α, ν1, ν2) = 2.86608
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# Decision:
# Se rechaza la hipotesis nula, la medicacion reduce la tension.
